/* ----------------------------------------------------------------
   Drivers for a standing model:

   - The two feet are constrained forward/backward and vertically (x & y)
   - The pelvis is constrained laterally (z)
   - The CoM is constrained forward/backward and laterally above the origin.

   The remaining degrees of freedom (with the exception of a few shoulder
   movements) are controlled by parameters in the mannequin.any file.

   The forces defined in the mannequin.any file are attached to the body
   locations at the bottom of this file.

   John Rasmussen, March 5, 2004.
   ----------------------------------------------------------------  */

AnyFolder Drivers = {

  #include "<ANYBODY_PATH_BODY>/BodyModels/include/MannequinDrivers.any"

  // Aliases for convenient referencing
  AnyFolder &JntPos=..Mannequin.Posture;
  AnyFolder &JntVel=..Mannequin.PostureVel;

  AnyFolder &LegR = ..BodyModel.Right.Leg;
  AnyFolder &LegL = ..BodyModel.Left.Leg;

  AnyFolder &RefHM = Main.Model.BodyModel;


  //Constraint the collective CoM to be right above the GlobalRef
//  AnyKinEqSimpleDriver CoMDriver =
//  {
//    AnyKinCoM CoM = {
//      AnyFolder &Body = Main.Model.HumanModel;
//      AnyFolder &Robot = Main.Model.EnvironmentModel.TEST_LOWER_EXO;
//    };
//    MeasureOrganizer = {0,2};  // Only the x and z directions
//    DriverPos = {0,0};
//    DriverVel = {0,0};
//    Reaction.Type = {Off,Off};
//  };


  #include "TrunkDrivers.any"


  #if BM_ARM_RIGHT == ON
    #include "RightArmDrivers.any"
  #else
  #endif


  #if BM_ARM_LEFT == ON
    #include "LeftArmDrivers.any"
  #else
  #endif


  #if BM_LEG_RIGHT == _LEG_MODEL_TLEM_
  //#include "RightLegTDDrivers.any"
  #else
  #endif


  #if BM_LEG_LEFT == _LEG_MODEL_TLEM_
  //#include "LeftLegTDDrivers.any"
  #else
  #endif


};//Drivers
